# Задание 1
x := 2
n := 5
y := (sqrt(x^3 + n) + cos(|n*x - 1|)^2)/(nthroot(x^5 + sin(x) + n, 4)*cos(π/4*(x + n)))
y = 2.52809
# Задание 2
x := 7
y := 10
z := -3
p := if(x > y, sin(x) + 3*|y| - z^2, (y + 3)*ln(|x + 1|)/sqrt(z^2 + 1))
p = 8.5485
q := if(x > y and x < 1, cos(x) + 2*|y + 1| - z, (x*y + 3)/sqrt(y^2 + 5))
q = 7.12407
w := if(x < y or y ≥ 10, x^2 + 2*(y*x + 1) - z, (x^-3*y^2 + 3)*sqrt(z^2 + 7))
w = 194
# Задание 3
f(x) := (x^2 - n*x + sin(x))*sqrt(|x - cos(n*x)|)
Δx := 0.4
x := -2, -2 + Δx .. 2
n := 5
f(x) = [14.1048; 11.5301; 9.56509; 1.50067; 0.224988; 0; -1.31047; -3.18616; -1.7767; -5.86657; -8.5776]
x = [-2; -1.6; -1.2; -0.8; -0.4; 0; 0.4; 0.8; 1.2; 1.6; 2]
# Задание 4
n := 5
a := -3*n
b := 3*n
i := 0 .. 2
j := 0
A[i, j] := a + rnd(b - a)
B[i, j] := a + rnd(b - a)
C[i, j] := a + rnd(b - a)
A = [-14.9619; -9.20031; 2.55018]
B = [-4.49076; 9.68513; -9.77613]
C = [6.31486; -5.88042; -12.2577]
# С использованием
# шаблонов
# Без использования
# шаблонов
s := A*B = -46.8467
s := A[0]*B[0] + A[1]*B[1] + A[2]*B[2] = -46.8467
V := B×C = [-176.205; -116.781; -34.7527]
V := [B[1]*C[2] - C[1]*B[2]; -(B[0]*C[2] - B[2]*C[0]); B[0]*C[1] - C[0]*B[1]] = [-176.205; -116.781; -34.7527]
w := (A×B)*C = 3622.16
w := [A[1]*B[2] - B[1]*A[2]; -(A[0]*B[2] - A[2]*B[0]); A[0]*B[1] - B[0]*A[1]] = [65.2446; -157.722; -186.225]
w := w*C = 3622.16
dA := sqrt(A[0]^2 + A[1]^2 + A[2]^2) = 17.7485
dB := sqrt(B[0]^2 + B[1]^2 + B[2]^2) = 14.4755
dC := sqrt(C[0]^2 + C[1]^2 + C[2]^2) = 14.9902
max(dA, dB, dC) = 17.7485
# Это A
M[12, 12] := 12
M = [
    0, 0, 0, 0, 0, 0, 0, 0, 0, 0, 0, 0, 0;
    0, 0, 0, 0, 0, 0, 0, 0, 0, 0, 0, 0, 0;
    0, 0, 0, 0, 0, 0, 0, 0, 0, 0, 0, 0, 0;
    0, 0, 0, 0, 0, 0, 0, 0, 0, 0, 0, 0, 0;
    0, 0, 0, 0, 0, 0, 0, 0, 0, 0, 0, 0, 0;
    0, 0, 0, 0, 0, 0, 0, 0, 0, 0, 0, 0, 0;
    0, 0, 0, 0, 0, 0, 0, 0, 0, 0, 0, 0, 0;
    0, 0, 0, 0, 0, 0, 0, 0, 0, 0, 0, 0, 0;
    0, 0, 0, 0, 0, 0, 0, 0, 0, 0, 0, 0, 0;
    0, 0, 0, 0, 0, 0, 0, 0, 0, 0, 0, 0, 0;
    0, 0, 0, 0, 0, 0, 0, 0, 0, 0, 0, 0, 0;
    0, 0, 0, 0, 0, 0, 0, 0, 0, 0, 0, 0, 0;
    0, 0, 0, 0, 0, 0, 0, 0, 0, 0, 0, 0, 12
]
i := 0 .. 12
j := 0 .. 12
M[i, j] := floor(-10 + 21*rnd(1))
M = [
    4, -6, -7, -3, -3, 6, 1, 6, -7, -2, -8, -9, 2;
    1, -4, 6, -5, 8, 5, -3, -6, -6, 1, -9, 1, -9;
    8, -7, 9, -10, -3, -2, 9, 1, 4, -5, 1, -2, 2;
    4, -1, -10, 2, 2, -6, -10, -9, 7, 7, 4, 1, -8;
    5, -10, 3, -9, 9, -5, 10, -4, -3, -6, -5, 8, 8;
    -9, -7, 6, -6, -10, -8, -4, -10, -7, -7, 8, -6, 3;
    9, 9, -7, 1, 9, 2, -5, -3, 6, -9, 2, -6, 3;
    2, -1, -2, 2, 9, -2, -7, 2, 3, -9, -5, 8, 5;
    -2, 8, -2, -3, 5, 5, -6, 4, -3, -8, -6, 3, 4;
    -9, -10, -4, -8, -9, 5, 4, 3, -8, -9, -1, 5, 4;
    -3, -9, -7, -4, -6, 0, -1, 2, -2, 7, 3, -9, 8;
    -4, -10, -2, -10, 8, -2, 2, 8, 2, 6, 2, 1, 4;
    -10, -3, 6, 8, 5, 8, 1, 6, -6, 6, 7, 3, 2
]
S := sum(sum(M[:, j]), j) = -119
S := sum(sum(M[i, j], j), i) = -119
S := sum(sum((M[i, j] > 0)*M[i, j], j), i) = 389
S := sum(sum((M[i, j] < 0)*M[i, j], j), i) = -508
X := M[:, 0]
Y := transpose(M)[:, 12]
X = [4; 1; 8; 4; 5; -9; 9; 2; -2; -9; -3; -4; -10]
Y = [-10; -3; 6; 8; 5; 8; 1; 6; -6; 6; 7; 3; 2]
S := X*Y = -84
# Задание 5
y(x) := e^(-(|x|/3))*cos(x)
x := -3*π .. 3*π
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# Задание 6
f(x) := if(x < 0, exp(x)*x^3, exp(-x)*x^3)
x := -9, -8.75 .. 9
x = [
    -9; -8.75; -8.5; -8.25; -8; -7.75; -7.5; -7.25; -7; -6.75
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]
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# Задание 7
g(x) := sqrt(|x|)*sin(x)
x := -2*π, -2*π + π/4 .. 2*π
x = [-6.28319; -5.49779; -4.71239; -3.92699; -3.14159; -2.35619; -1.5708; -0.785398; 0; 0.785398; 1.5708; 2.35619; 3.14159; 3.92699; 4.71239; 5.49779; 6.28319]
g(x) = [0; 1.65798; 2.1708; 1.40125; 0; -1.0854; -1.25331; -0.626657; 0; 0.626657; 1.25331; 1.0854; 0; -1.40125; -2.1708; -1.65798; 0]
X := x
# Задание 8
q(x) := e^(-x^2)
x := -10, -9.99 .. 10
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# Задание 9
h(x, y) := sin(sqrt(x^2 + y^2))/sqrt(x^2 + y^2)
# [component: inputs h]
# Задание 10
f(x) := x^2 + (x - 2)*sin(x) - 5
x := -5 .. 5
root(f(x), x) = [-1.32936; -1.32936; -1.32936; -1.32936; -1.32936; -1.32936; 2.19967; 2.19967; 2.19967; 2.19967; 2.19967]
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x := 2.2
x^2 + (x - 2)*sin(x) - 5 = 0.00169928
x := -1.329
x^2 + (x - 2)*sin(x) - 5 = -0.00160155
# Задание 11
f(x) := x^2 + x*sin(2*x) - (x - 5)*cos(x)
root(f(x), x, -4, 4) =  # error: Значения функции в конечных точках должны иметь противоположные знаки.
root(f(x1), x1, -2, 0) = -1.93283
# Задание 12
f(x) := 0
n := 1 .. 10
f(x) := x^3 + (4 - n)*x^2 + (3 - 4*n)*x - 3*n
x^3 + (4 - n)*x^2 + (3 - 4*n)*x - 3*n
[x^3 + 4*x^2 + 3*x; -x^2 - 4*x - 3]
[-3*n; 3 - 4*n; 4 - n; 1]
