# Задание 10
f(x) := x^2 + (x - 2)*sin(x) - 5
Δx := 0.1
x := -5, -5 + Δx .. 5
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x1 := -2
x2 := 2
r1 := root(f(x1), x1)
r2 := root(f(x2), x2)
r1 = -1.32936
r2 = 2.19967
f(r1) = 1.1382e-11
f(r2) = 3.52607e-13
