# Задание 11
f(x) := x^2 + x*sin(2*x) - (x - 5)*cos(x)
Δx := 0.1
x := -4, -4 + Δx .. 4
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r1 := root(f(x), x, -4, -2.2)
r2 := root(f(x), x, -2.2, 0)
r1 = -2.97354
r2 = -1.93283
f(r1) = 1.77636e-15
f(r2) = 1.33227e-15
