# Задание 13
n := 7
A := [n, n + 1, n + 2; n - 3, n - 2, n; n - 1, n, n + 1] = [7, 8, 9; 4, 5, 7; 6, 7, 8]
B := [6*n + 8; 6*n - 7; 6*n + 2] = [50; 35; 44]
X := A^-1*B = [1; 2; 3]
Проверка
n*X[0] + (n + 1)*X[1] + (n + 2)*X[2] == 6*n + 8 = 0
(n - 3)*X[0] + (n - 2)*X[1] + (n*X)[2] == 6*n - 7 = 0
(n - 1)*X[0] + (n*X)[1] + (n + 1)*X[2] == 6*n + 2 = 0
|A| ≠ 0 = 1
x := 0
y := 0
z := 0
Given
n*x + (n + 1)*y + (n + 2)*z == 6*n + 8
(n - 3)*x + (n - 2)*y + n*z == 6*n - 7
(n - 1)*x + n*y + (n + 1)*z == 6*n + 2
V := Find(x, y, z)
V = [1; 2; 3]
