# Задание 14
x := 0
y := 5
(x - 9)^2 + (y - 2)^2 == 25
x^2/81 + y^2/16 == 1
Given
t := 0, 0.01 .. 2*π
x^2/81 + y^2/16 == 1
x1(t) := 9 + 5*cos(t)
x2(t) := 9*cos(t)
(x - 9)^2 + (y - 2)^2 == 25
y1(t) := 2 + 5*sin(t)
y2(t) := 4*sin(t)
V := Find(x, y)
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V = [4.23934; 3.52845]
x := 10
y := -5
Given
x^2/81 + y^2/16 == 1
(x - 9)^2 + (y - 2)^2 == 25
V := Find(x, y)
V = [6.9308; -2.55175]
