# Задание 15
Δx := 0.1
f(x) := x*sin(x)
x := 0, 0 + Δx .. 10
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x := 5
x1_min := Minimize(f, x) = 4.91318
y1_min := f(x1_min) = -4.81447
x := 2
y := 5*(2 > 1) = 5
x1_max := Maximize(f, x) = 2.02876
y1_max := f(x1_max) = 1.81971
x := 8
x2_max := Maximize(f, x) = 7.97867
y2_max := f(x2_max) = 7.91673
