# Задание 3
n := 5
f(x) := (x^2 - n*x + sin(x))*sqrt(|x - cos(n*x)|)
Δx := 0.4
x := -2, -2 + Δx .. 2
n := 5
f(x) = [14.1048; 11.5301; 9.56509; 1.50067; 0.224988; 0; -1.31047; -3.18616; -1.7767; -5.86657; -8.5776]
x = [-2; -1.6; -1.2; -0.8; -0.4; 0; 0.4; 0.8; 1.2; 1.6; 2]
