# Задание 4
n := 5
a := -3*n
b := 3*n
i := 0 .. 2
j := 0
A[i, j] := a + rnd(b - a)
B[i, j] := a + rnd(b - a)
C[i, j] := a + rnd(b - a)
A = [-14.9619; -9.20031; 2.55018]
B = [-4.49076; 9.68513; -9.77613]
C = [6.31486; -5.88042; -12.2577]
# С использованием
# шаблонов
# Без использования
# шаблонов
s := A*B = -46.8467
s := A[0]*B[0] + A[1]*B[1] + A[2]*B[2] = -46.8467
V := B×C = [-176.205; -116.781; -34.7527]
V := [B[1]*C[2] - C[1]*B[2]; -(B[0]*C[2] - B[2]*C[0]); B[0]*C[1] - C[0]*B[1]] = [-176.205; -116.781; -34.7527]
w := (A×B)*C = 3622.16
w := [A[1]*B[2] - B[1]*A[2]; -(A[0]*B[2] - A[2]*B[0]); A[0]*B[1] - B[0]*A[1]] = [65.2446; -157.722; -186.225]
w := w[0]*C[0] + w[1]*C[1] + w[2]*C[2] = 3622.16
dA := sqrt(A[0]^2 + A[1]^2 + A[2]^2) = 17.7485
dB := sqrt(B[0]^2 + B[1]^2 + B[2]^2) = 14.4755
dC := sqrt(C[0]^2 + C[1]^2 + C[2]^2) = 14.9902
MaxLen := max(dA, dB, dC) = 17.7485
Result := if(MaxLen == dA, "Это А", if(MaxLen == dB, "Это Б", "Это С")) = "Это А"
M[12, 12] := 12
M = [
    0, 0, 0, 0, 0, 0, 0, 0, 0, 0, 0, 0, 0;
    0, 0, 0, 0, 0, 0, 0, 0, 0, 0, 0, 0, 0;
    0, 0, 0, 0, 0, 0, 0, 0, 0, 0, 0, 0, 0;
    0, 0, 0, 0, 0, 0, 0, 0, 0, 0, 0, 0, 0;
    0, 0, 0, 0, 0, 0, 0, 0, 0, 0, 0, 0, 0;
    0, 0, 0, 0, 0, 0, 0, 0, 0, 0, 0, 0, 0;
    0, 0, 0, 0, 0, 0, 0, 0, 0, 0, 0, 0, 0;
    0, 0, 0, 0, 0, 0, 0, 0, 0, 0, 0, 0, 0;
    0, 0, 0, 0, 0, 0, 0, 0, 0, 0, 0, 0, 0;
    0, 0, 0, 0, 0, 0, 0, 0, 0, 0, 0, 0, 0;
    0, 0, 0, 0, 0, 0, 0, 0, 0, 0, 0, 0, 0;
    0, 0, 0, 0, 0, 0, 0, 0, 0, 0, 0, 0, 0;
    0, 0, 0, 0, 0, 0, 0, 0, 0, 0, 0, 0, 12
]
i := 0 .. 12
j := 0 .. 12
a := -10
b := 10
M[i, j] := round(a + rnd(b - a))
M = [
    -7, 10, -8, -10, 1, 2, -7, -1, -9, 6, 0, 8, 9;
    1, -1, 7, 6, 10, 2, -5, 7, -2, 4, -10, -4, 2;
    7, 0, 5, -1, 5, 2, 5, 1, -7, -1, 0, 5, -7;
    0, 4, -7, -7, 4, -1, 9, -7, 6, -6, 6, -7, 5;
    -4, 4, 4, -8, 7, 0, -1, 9, 1, -1, 7, -1, 10;
    5, -6, 7, 0, -9, 1, 1, 7, 3, 7, -8, -4, -4;
    -7, 7, 2, -5, -10, 6, -6, 1, -8, 5, 1, -1, 4;
    -1, 2, 3, 0, 4, -6, -6, -1, -8, -8, 9, 8, -5;
    -2, 3, -1, 2, 7, 2, 1, -6, 1, -5, 2, 2, 0;
    5, 2, 6, 2, 8, 5, 3, -4, -4, -8, 7, -7, -8;
    3, 1, -2, -1, -7, 5, 7, 7, -4, -7, 6, 2, -9;
    3, -8, -5, 8, 3, 0, 0, 0, 4, 2, -10, -8, 7;
    5, -2, 1, 9, -6, -7, 9, -9, -9, -7, 7, 4, -10
]
Sum := sum(sum(M[:, j]), j) = 26
Sum := sum(sum(M[i, j], j), i) = 26
SumPlus := sum(sum((M[i, j] > 0)*M[i, j], j), i) = 415
SumMinus := sum(sum((M[i, j] < 0)*M[i, j], j), i) = -389
X := M[:, 0]
Y := transpose(M)[:, cols(M) - 1]
P := X*Y = -129
X = [-7; 1; 7; 0; -4; 5; -7; -1; -2; 5; 3; 3; 5]
Y = [5; -2; 1; 9; -6; -7; 9; -9; -9; -7; 7; 4; -10]
