# Задание 7
g(x) := sqrt(|x|)*sin(x)
Δx := π/4
x1 := -2*π
x2 := 2*π
i := 0 .. (x2 - x1)/Δx
x[i] := x1 + i*Δx
X[i] := x[i]
Y[i] := g(x[i])
X = [-6.28319; -5.49779; -4.71239; -3.92699; -3.14159; -2.35619; -1.5708; -0.785398; 0; 0.785398; 1.5708; 2.35619; 3.14159; 3.92699; 4.71239; 5.49779; 6.28319]
Y = [0; 1.65798; 2.1708; 1.40125; 0; -1.0854; -1.25331; -0.626657; 0; 0.626657; 1.25331; 1.0854; 0; -1.40125; -2.1708; -1.65798; 0]
WRITEPRN("X.txt") := X
WRITEPRN("Y.txt") := Y
XX := READPRN("X.txt")
YY := READPRN("Y.txt")
XX = [-6.283; -5.498; -4.712; -3.927; -3.142; -2.356; -1.571; -0.7854; 0; 0.7854; 1.571; 2.356; 3.142; 3.927; 4.712; 5.498; 6.283]
YY = [0; 1.658; 2.171; 1.401; 0; -1.085; -1.253; -0.6267; 0; 0.6267; 1.253; 1.085; 0; -1.401; -2.171; -1.658; 0]
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