# Кривые Безье
x := READPRN("D:\6sem_BSTU\OKG\Lab11\Lab_8\Lab01\Lagr_Source_Points_X.txt")
y := READPRN("D:\6sem_BSTU\OKG\Lab11\Lab_8\Lab01\Lagr_Source_Points_Y.txt")
xP := READPRN("D:\6sem_BSTU\OKG\Lab11\Lab_8\Lab01\Lagr_Polynomial_Points_X.txt")
yP := READPRN("D:\6sem_BSTU\OKG\Lab11\Lab_8\Lab01\Lagr_Polynomial_Points_Y.txt")
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x := READPRN("D:\6sem_BSTU\OKG\Lab11\Lab_8\Lab01\Bezier_Control_X_Variant0.txt")
y := READPRN("D:\6sem_BSTU\OKG\Lab11\Lab_8\Lab01\Bezier_Control_Y_Variant0.txt")
xP := READPRN("D:\6sem_BSTU\OKG\Lab11\Lab_8\Lab01\Bezier_Curve_X_Variant3.txt")
yP := READPRN("D:\6sem_BSTU\OKG\Lab11\Lab_8\Lab01\Bezier_Curve_Y_Variant3.txt")
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x := READPRN("D:\6sem_BSTU\OKG\Lab11\Lab_8\Lab01\Bezier_Control_X_Variant1.txt")
y := READPRN("D:\6sem_BSTU\OKG\Lab11\Lab_8\Lab01\Bezier_Control_Y_Variant1.txt")
xP := READPRN("D:\6sem_BSTU\OKG\Lab11\Lab_8\Lab01\Bezier_Curve_X_Variant4.txt")
yP := READPRN("D:\6sem_BSTU\OKG\Lab11\Lab_8\Lab01\Bezier_Curve_Y_Variant4.txt")
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x := READPRN("D:\6sem_BSTU\OKG\Lab11\Lab_8\Lab01\Bezier_Control_X_Variant2.txt")
y := READPRN("D:\6sem_BSTU\OKG\Lab11\Lab_8\Lab01\Bezier_Control_Y_Variant2.txt")
xP := READPRN("D:\6sem_BSTU\OKG\Lab11\Lab_8\Lab01\Bezier_Curve_X_Variant5.txt")
yP := READPRN("D:\6sem_BSTU\OKG\Lab11\Lab_8\Lab01\Bezier_Curve_Y_Variant5.txt")
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x := READPRN("D:\6sem_BSTU\OKG\Lab11\Lab_8\Lab01\Bezier_Control_X_Variant3.txt")
y := READPRN("D:\6sem_BSTU\OKG\Lab11\Lab_8\Lab01\Bezier_Control_Y_Variant3.txt")
xP := READPRN("D:\6sem_BSTU\OKG\Lab11\Lab_8\Lab01\Bezier_Curve_X_Variant6.txt")
yP := READPRN("D:\6sem_BSTU\OKG\Lab11\Lab_8\Lab01\Bezier_Curve_Y_Variant6.txt")
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