# Задание 1
Xa := -2
Ya := -4
Xb := -3
Yb := 0
Xc := 0
Yc := 4
Xd := 3
Yd := 0
Xe := 2
Ye := -4
Xf := -2
Yf := 0
Xh := 2
Yh := 0
Dx := [Xa; Xb; Xc; Xd; Xe; Xf; Xh] = [-2; -3; 0; 3; 2; -2; 2]
Dy := [Ya; Yb; Yc; Yd; Ye; Yf; Yh] = [-4; 0; 4; 0; -4; 0; 0]
# Вычисляем границы области D:
XL := min(Dx) = -3
YL := min(Dy) = -4
XH := max(Dx) = 3
YH := max(Dy) = 4
# Границы области Dw:
XLw := 100
YLw := 200
XHw := 400
YHw := 500
Kx := (XHw - XLw)/(XH - XL) = 50
Ky := (YHw - YLw)/(YH - YL) = 37.5
# Строим матрицу для пересчёта МСК -> ОСК:
T := [Kx, 0, -Kx*XL + XLw; 0, -Ky, Ky*YL + YHw; 0, 0, 1]
[Xaw; Yaw; e] := T*[Xa; Ya; 1] = [150; 500; 1]
[Xbw; Ybw; e] := T*[Xb; Yb; 1] = [100; 350; 1]
[Xcw; Ycw; e] := T*[Xc; Yc; 1] = [250; 200; 1]
[Xdw; Ydw; e] := T*[Xd; Yd; 1] = [400; 350; 1]
[Xew; Yew; e] := T*[Xe; Ye; 1] = [350; 500; 1]
[Xfw; Yfw; e] := T*[Xf; Yf; 1] = [150; 350; 1]
[Xhw; Yhw; e] := T*[Xh; Yh; 1] = [350; 350; 1]
X := [Xb; Xc; Xd; Xb; Xf; Xa; Xe; Xh]
Y := [Yb; Yc; Yd; Yb; Yf; Ya; Ye; Yh]
Xw := [Xbw; Xcw; Xdw; Xbw; Xfw; Xaw; Xew; Xhw]
Yw := [Ybw; Ycw; Ydw; Ybw; Yfw; Yaw; Yew; Yhw]
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