# Задание 2
# Границы области Dw:
Xlw := 100
f(x) := sin(π*x)*sqrt(|x|)
Ylw := 200
x1 := -6
x2 := 6
Δx := 0.1
Xhw := 800
n := (x2 - x1)/Δx = 120
i := 0 .. n - 1
Yhw := 900
# Заполняем массив со значениями для МСК:
Dx[i] := x1 + i*Δx
Dy[i] := f(Dx[i])
# Вычисляем границы области D:
Xl := min(Dx)
Yl := min(Dy)
Xh := max(Dx)
Yh := max(Dy)
Kx := (Xhw - Xlw)/(Xh - Xl) = 58.8235
Ky := (Yhw - Ylw)/(Yh - Yl) = 149.241
# Строим матрицу для пересчёта МСК -> ОСК:
T := [Kx, 0, -Kx*Xl + Xlw; 0, -Ky, Ky*Yl + Yhw; 0, 0, 1]
# Мы не можем посчитать вручную - слишком много элементов
Z[i] := 1
V := stack(transpose(Dx), transpose(Dy), transpose(Z))
Vw := T*V
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