X0 := 4
Y0 := 2
-координаты*точки*А
X1 := 4
Y1 := 8
-координаты*точки*B
X2 := 6
Y2 := 7
-координаты*точки*C
X3 := 6
Y3 := 3
-координаты*точки*D
X4 := X0
Y4 := Y0
-повторение*координаты*точкиA
X := [X0; X1; X2; X3; X4]
Y := [Y0; Y1; Y2; Y3; Y4]
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# Цель: найти точку пересечения прямых, построенных на отрезках BC и AD
# 1. Найдем уравнение прямой, проходящей через точки B и C
# Сначала находим её угловой коэффициент:
Kbc := (Y2 - Y1)/(X2 - X1) = -0.5
# Уравнение прямой BC будет иметь вид:
y(x) := Kbc*(x - X1) + Y1
# 2. Найдем уравнение прямой, проходящей через точки A и D
Kad := (Y3 - Y0)/(X3 - X0) = 0.5
# Уравнение прямой AD будет иметь вид:
f(x) := Kad*(x - X0) + Y0
# 3. Решим систему уравнений
x := 0 .. 20
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x := 0
y := 0
Given
y == Kbc*(x - X1) + Y1
y == Kad*(x - X0) + Y0
Find(x, y) = [10; 5]  # -Точка пересечения прямых BC и AD имеет координаты (10,5)
Px := 10
Py := 5
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P := [X0, X1, X2, X3; Y0, Y1, Y2, Y3; 1, 1, 1, 1] = [4, 4, 6, 6; 2, 8, 7, 3; 1, 1, 1, 1]
# Фигура ABCD поворачивается вокруг точки P (10,5) на угол 90° по часовой стрелке
# Шаг 1: Смещение системы координат
Ts(dx, dy) := [1, 0, -dx; 0, 1, -dy; 0, 0, 1]
M := Ts(Px, Py)*P = [-6, -6, -4, -4; -3, 3, 2, -2; 1, 1, 1, 1]
# Шаг 2: Применение матрицы поворота
Rs(φ) := [cos(φ), sin(φ), 0; -sin(φ), cos(φ), 0; 0, 0, 1]
φ := 90*π/180 = 1.5708
M := Rs(φ)*M = [-3, 3, 2, -2; 6, 6, 4, 4; 1, 1, 1, 1]
# Шаг 3: Обратное смещение
M := Ts(-Px, -Py)*M = [7, 13, 12, 8; 11, 11, 9, 9; 1, 1, 1, 1]
Z0 := M[0, 0] = 7
Q0 := M[1, 0] = 11
-координаты*точки*А1
Z1 := M[0, 1] = 13
Q1 := M[1, 1] = 11
-координаты*точки*B1
Z2 := M[0, 2] = 12
Q2 := M[1, 2] = 9
-координаты*точки*C1
Z3 := M[0, 3] = 8
Q3 := M[1, 3] = 9
-координаты*точки*D1
Z4 := Z0 = 7
Q4 := Q0 = 11
-повторение*координаты*точкиA1
Z := [Z0; Z1; Z2; Z3; Z4]
Q := [Q0; Q1; Q2; Q3; Q4]
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