# Мировые координаты: Это основная, глобальная система координат для всей 3D-сцены
# Видовые координаты: Это система координат, связанная с камерой. Начало этой системы координат находится в точке, где расположена камера.
# Оконные координаты: Это 2D-система координат, которая соответствует конкретной области на экране компьютера, где будет нарисовано изображение
# 1. Задать координаты вершин усеченной пирамиды (рис.1) в мировой декартовой системе координат (X Y Z)  и положение камеры (наблюдателя) в мировой сферической системе координат (r, φ, θ) = (10, 315, 45)  .
# Эта матрица имеет 4 строки и 6 столбцов. В данном формате каждый столбец представляет одну вершину пирамиды
# Строка 1: Содержит X-координаты всех 6 вершин.
# Строка 2: Содержит Y-координаты всех 6 вершин.
# Строка 3: Содержит Z-координаты всех 6 вершин.
# Строка 4: Содержит однородную координату. Она равна 1 для всех вершин.
M := [0, 0, 3, 0, 0, 1; 3, 0, 0, 1, 0, 0; 0, 0, 0, 3, 3, 3; 1, 1, 1, 1, 1, 1]
Vc := [10; 315; 45]  # Вектор хранит сферические координаты положения камеры
# Сферические координаты камеры извлечены и преобразованы в отдельные переменные: r (радиус), phi (азимутальный угол в радианах), theta (полярный угол в радианах).
r_v := Vc[0] = 10
ϕ_v := Vc[1]*π/180 = 5.49779
θ_v := Vc[2]*π/180 = 0.785398
# 2. Построить изображение пирамиды без удаления невидимых граней, рис. 1а (использовать лекционный пример). Построенный рисунок должен моделировать изображение пирамиды в прямоугольной об-ласти окна Windows с координатами:
# (200, 100) – оконные координаты левого верхнего угла области  ;
# (700, 500) – оконные координаты правого нижнего угла области  ;
# Задаются координаты прямоугольной области на экране (окна Windows), в которой будет нарисована пирамида
x_LW := 200
y_LW := 100  # – левый верхний угол области отображения
x_HW := 700
y_HW := 500  # – правый нижний угол области отображения
# Формируем матрицу пересчета мировых координат в видовые
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K_view := [
    -sin(ϕ_v), cos(ϕ_v), 0, 0;
    -cos(θ_v)*cos(ϕ_v), -cos(θ_v)*sin(ϕ_v), sin(θ_v), 0;
    -sin(θ_v)*cos(ϕ_v), -sin(θ_v)*sin(ϕ_v), -cos(θ_v), r_v;
    0, 0, 0, 1
]
# Эта матрица учитывает положение и ориентацию камеры, заданные ранее сферическими координатами (rᵥ, Φᵥ, θᵥ). Она математически "поворачивает" и "сдвигает" всю мировую систему координат так, чтобы камера оказалась в начале координат новой, видовой системы, смотрела вдоль одной из осей, а направления "вверх" и "вправо" для камеры соответствовали осям Y' и X'.
M_view := K_view*M  # Получаем новую матрицу. Она содержит координаты тех же 6 вершин пирамиды, но уже в видовой системе координат.
# Следующий шаг – спроецировать 3D точки из видовой системы на 2D плоскость
# M_view<0> извлекает первую строку (все X'-координаты вершин из M_view), M_view<1> извлекает вторую строку (все Y'-координаты).
M_XY := stack(transpose(transpose(M_view)[:, 0]), transpose(transpose(M_view)[:, 1]), transpose(transpose(M_view)[:, 3]))
M_XY = [
    2.12132, 0, 2.12132, 0.707107, 0, 0.707107;
    1.5, 0, -1.5, 2.62132, 2.12132, 1.62132;
    1, 1, 1, 1, 1, 1
]
# Вычисление габаритного прямоугольника
x_L := min(transpose(M_XY)[:, 0]) = 0
y_L := min(transpose(M_XY)[:, 1]) = -1.5  # - левый верхний угол
x_H := max(transpose(M_XY)[:, 0]) = 2.12132
y_H := max(transpose(M_XY)[:, 1]) = 2.62132  # - правый нижний угол
# Спроецированная пирамида на картинной плоскости ВСК вписывается в прямоугольник с координатами углов (xL, yL) = (0, -1.5) и (xH, yH) = (2.121, 2.621)
# Вычисляем параметры, необходимые для формирования матрицы пересчета координат из плоскости XY ВСК в ОСК
k_x := (x_HW - x_LW)/(x_H - x_L) = 235.702
k_y := (y_HW - y_LW)/(y_H - y_L) = 97.0563
T_SW := [k_x, 0, x_LW - k_x*x_L; 0, -k_y, y_HW + k_y*y_L; 0, 0, 1] = [235.702, 0, 200; 0, -97.0563, 354.416; 0, 0, 1]  # – матрица пересчета из ВСК в ОСК
# Применяем матрицу T_SW
M_W := T_SW*M_XY
# - Матрица M_W содержит окончательные координаты вершин пирамиды в оконной системе координат
M_W = [
    700, 200, 700, 366.667, 200, 366.667;
    208.831, 354.416, 500, 100, 148.528, 197.056;
    1, 1, 1, 1, 1, 1
]
# Так как координаты на экране обычно целочисленные (пиксели), результат применения матрицы T_SW округляется до ближайших целых чисел
[x_a, x_b, x_c, x_d, x_e, x_f; y_a, y_b, y_c, y_d, y_e, y_f; q, q, q, q, q, q] := vectorize(round(M_W)) = [700, 200, 700, 367, 200, 367; 209, 354, 500, 100, 149, 197; 1, 1, 1, 1, 1, 1]
# Формируем массивы координат X и Y для рисования пирамиды
X := transpose([x_a, x_b, x_c, x_a, x_d, x_e, x_b, x_e, x_f, x_c, x_f, x_d])
# Наши координаты в M_W были рассчитаны для оконной системы, где Y растет вниз. Однако стандартный XY-график в Mathcad имеет ось Y, направленную вверх. Чтобы изображение на графике выглядело правильно, мы инвертируем Y-координаты.
Y := -transpose([y_a, y_b, y_c, y_a, y_d, y_e, y_b, y_e, y_f, y_c, y_f, y_d])
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# Все ребра нарисованы, независимо от того, видимы они из положения камеры или должны быть перекрыты другими гранями
# 3. Построить изображение пирамиды с удалением невидимых граней. Построенный рисунок должен моделировать изображение пирамиды в прямоугольной области окна Windows с координатами:
# (200, 100) – оконные координаты левого верхнего угла области  ;
# (700, 500) – оконные координаты правого нижнего угла области  ;
# Вычисляется вектор положения камеры (C) в мировой декартовой системе координат (XYZ). Мы переводим сферические координаты (rᵥ, Φᵥ, θᵥ), которые мы задали ранее, в декартовы по стандартным формулам:
R_C := [r_v*sin(θ_v)*cos(ϕ_v); r_v*sin(θ_v)*sin(ϕ_v); r_v*cos(θ_v)] = [5; -5; 7.07107]
# Определяем координаты трех вершин пирамиды
A := [3; 0; 0]
B := [1; 0; 3]
C := [0; 3; 0]
# AC := C - A: Вектор, идущий от A к C
# AB := B - A: Вектор, идущий от A к B
# Эти два вектора лежат на гранях пирамиды, исходящих из вершины A. Они нужны для вычисления нормалей к этим граням
AC := C - A = [-3; 3; 0]
AB := B - A = [-2; 0; 3]
# Нормаль к грани – это вектор, перпендикулярный поверхности этой грани и указывающий "наружу" от ее лицевой стороны.
# Самый распространенный и фундаментальный способ найти нормаль – использовать векторное произведение
# Результатом векторного произведения будет вектор, перпендикулярный обоим исходным векторам, а значит, перпендикулярный плоскости, в которой лежит треугольник
N_ABC := [0; 0; -1]  # Нормаль к нижней грани, образованной точками A=(3,0,0), B=(0,0,0), C=(0,3,0). Эта грань лежит в плоскости Z=0, нормаль направлена вниз
N_A1B1C1 := [0; 0; 1]  # Нормаль к верхней грани, образованной A1=(1,0,3), B1=(0,0,3), C1=(0,3,3). Эта грань лежит в плоскости Z=3, нормаль направлена вверх
N_BCC1B1 := [-1; 0; 0]
# Нормаль к боковой грани, образованной C=(0,3,0), B=(0,0,0), B1=(0,0,3), C1=(0,3,3). Эта грань лежит в плоскости X=0 (плоскость YZ), нормаль направлена против оси X
# Нормаль к боковой грани, образованной А=(3,0,0), B=(0,0,0), B1=(0,0,3), А1=(1,0,3). Эта грань лежит в плоскости Y=0 (плоскость XZ), нормаль направлена против оси Y
N_ABB1A1 := [0; -1; 0]
N_ACC1A1 := AC×AB = [9; 9; 6]  # Нормаль для наклонной грани
# Вычисляется скалярное произведение (dot product) вектора положения камеры и нормали грани
# - Если скалярное произведение ≥ 0, угол между вектором на камеру и внешней нормалью грани меньше или равен 90 градусов. Это значит, что грань "смотрит" в сторону камеры (или камера смотрит на нее сбоку). Грань видима.
# - Если скалярное произведение < 0, угол больше 90 градусов. Внешняя нормаль "указывает" в сторону от камеры. Это обратная ("задняя") грань, она невидима.
q1 := R_C*N_ABC = -7.07107
s1 := if(q1 ≥ 0, "Грань ABC видима", "Грань ABC невидима") = "Грань ABC невидима"
q2 := R_C*N_A1B1C1 = 7.07107
s2 := if(q2 ≥ 0, "Грань A1B1C1 видима", "Грань A1B1C1 невидима") = "Грань A1B1C1 видима"
q3 := R_C*N_BCC1B1 = -5
s3 := if(q3 ≥ 0, "Грань BCC1B1 видима", "Грань BCC1B1 невидима") = "Грань BCC1B1 невидима"
q4 := R_C*N_ABB1A1 = 5
s4 := if(q4 ≥ 0, "Грань ABB1A1 видима", "Грань ABB1A1 невидима") = "Грань ABB1A1 видима"
q5 := R_C*N_ACC1A1 = 42.4264
s5 := if(q5 ≥ 0, "Грань ACC1A1 видима", "Грань ACC1A1 невидима") = "Грань ACC1A1 видима"
# Формируем массивы координат X и Y для рисования пирамиды
X := transpose([x_e, x_b, x_c, x_f, x_e, x_d, x_f, x_c, x_a, x_d])
Y := -transpose([y_e, y_b, y_c, y_f, y_e, y_d, y_f, y_c, y_a, y_d])
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# 4. Построить сечение пирамиды (без удаления невидимых граней) плоскостью, положение которой в пространстве определяется: вектором нормали (0,sinφ, cosφ) и точко пересечения с осью Z (0,0, z0)
# Задаем положение секущей плоскости в МСК XYZ
ϕ_grad := 50
ϕ := ϕ_grad/180*π = 0.872665  # Угол переводится в радианы для использования в тригонометрических функциях
N := transpose([0, sin(ϕ), cos(ϕ)]) = [0; 0.766044; 0.642788]  # Вектор нормали (N) к секущей плоскости
# Задаются X и Y координаты точки, через которую проходит плоскость на оси Z
x_0 := 0
y_0 := 0
# Определяется Z-координата точки пересечения плоскости с осью Z
z_0 := 3/4*M[:, 3][2] = 2.25  # Наша плоскость пересекает ось Z (Z-координата B1) на высоте 2.25
# Уравнение плоскости имеет вид: Ax + By + Cz + D = 0. Коэффициенты A, B, C берутся из вектора нормали N
[A; B; C] := N
[A; B; C] = [0; 0.766044; 0.642788]
D := -(A*x_0 + B*y_0 + C*z_0) = -1.44627
# Уравнение секущей плоскости полностью определено: 0*x + 0.766*y + 0.643*z - 1.446 = 0
# Чтобы плоскость пересекла ребро пирамиды (отрезок между двумя вершинами), эти две вершины должны лежать по разные стороны от плоскости-листа.
# Находим точку пересечения P1 секущей плоскости с ребром AD
# параметры submatrix:
# 1. с какой строки берем
# 2. до какой строки берем
# 3. с какого столбца берем
# 4. до какого столбца берем
[x1; y1; z1] := submatrix(M, 0, 2, 0, 0) = [0; 3; 0]
[x2; y2; z2] := submatrix(M, 0, 2, 3, 3) = [0; 1; 3]
Δx := x2 - x1 = 0
Δy := y2 - y1 = -2
Δz := z2 - z1 = 3
t_AD := -((A*x1 + B*y1 + C*z1 + D)/(A*Δx + B*Δy + C*Δz))
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t_AD := 0.3
x_AD := x1 + Δx*t_AD = 0
y_AD := y1 + Δy*t_AD = 2.4
z_AD := z1 + Δz*t_AD = 0.9
# Находим точку пересечения P2 секущей плоскости с ребром CF
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V1 := submatrix(M, 0, 2, 2, 2) = [3; 0; 0]
V2 := submatrix(M, 0, 2, 5, 5) = [1; 0; 3]
ΔV := V2 - V1
t_CF := -((N*V1 + D)/(N*ΔV)) = 0.75
V_CF := V1 + ΔV*t_CF = [1.5; 0; 2.25]
x_CF := V_CF[0] = 1.5
y_CF := V_CF[1] = 0  # - координаты точки пересечения Р2
z_CF := V_CF[2] = 2.25
# Находим точку пересечения P3 секущей плоскости с ребром BE
V1 := submatrix(M, 0, 2, 1, 1) = [0; 0; 0]
V2 := submatrix(M, 0, 2, 4, 4) = [0; 0; 3]
ΔV := V2 - V1 = [0; 0; 3]
t_BE := -((N*V1 + D)/(N*ΔV)) = 0.75
V_BE := V1 + ΔV*t_BE = [0; 0; 2.25]
x_BE := V_BE[0] = 0
y_BE := V_BE[1] = 0
z_BE := V_BE[2] = 2.25  # - координаты точки пересечения Р3
# Получаем матрицу мировых коорднат точек P1, P2, P3
TR := [x_AD, x_CF, x_BE; y_AD, y_CF, y_BE; z_AD, z_CF, z_BE; 1, 1, 1]
# Вычисляем координаты вершин треугольника сечения Р1,
# Р2, Р3 в видовой системе координат (ВСК)
TR_V := K_view*TR
# Определяем координаты проекции вершин треугольника сечения Р1,
# Р2, Р3 на картинную плоскость
TR_XY := stack(transpose(transpose(TR_V)[:, 0]), transpose(transpose(TR_V)[:, 1]), transpose(transpose(TR_V)[:, 3]))
# Вычисляем оконные координаты вершин треугольника сечения Р1, Р2, Р3
TR_W := T_SW*TR_XY
[x_p1, x_p2, x_p3; y_p1, y_p2, y_p3; q, q, q] := vectorize(round(TR_W)) = [600, 450, 200; 176, 273, 200; 1, 1, 1]
# Формируем массивы координат Х и У для рисования сечения пирамиды
XC := transpose([x_p1, x_p2, x_p3, x_p1])
YC := -transpose([y_p1, y_p2, y_p3, y_p1])
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