# Мировые координаты: Это основная, глобальная система координат для всей 3D-сцены
# Видовые координаты: Это система координат, связанная с камерой. Начало этой системы координат находится в точке, где расположена камера.
# Оконные координаты: Это 2D-система координат, которая соответствует конкретной области на экране компьютера, где будет нарисовано изображение
# 1. Задать координаты вершин усеченной пирамиды (рис.1) в мировой декартовой системе координат (X Y Z)  и положение камеры (наблюдателя) в мировой сферической системе координат (r, φ, θ) = (10, 315, 45) .
# Эта матрица имеет 4 строки и 6 столбцов. В данном формате каждый столбец представляет одну вершину пирамиды
# Строка 1: Содержит X-координаты всех 6 вершин.
# Строка 2: Содержит Y-координаты всех 6 вершин.
# Строка 3: Содержит Z-координаты всех 6 вершин.
# Строка 4: Содержит однородную координату. Она равна 1 для всех вершин.
M := [4, 0, 0, 1, 0, 0; 0, 0, 4, 0, 0, 1; 0, 0, 0, 4, 4, 4; 1, 1, 1, 1, 1, 1]
Vc := [10; 315; 45]  # Вектор хранит сферические координаты положения камеры
# Сферические координаты камеры извлечены и преобразованы в отдельные переменные: r (радиус), phi (азимутальный угол в радианах), theta (полярный угол в радианах).
r_v := Vc[0] = 10
ϕ_v := Vc[1]*π/180 = 5.49779
θ_v := Vc[2]*π/180 = 0.785398
# Задание матриц координат вершин пирамиды
A := submatrix(M, 0, 2, 0, 0)
B := submatrix(M, 0, 2, 1, 1)
C := submatrix(M, 0, 2, 2, 2)
A1 := submatrix(M, 0, 2, 3, 3)
B1 := submatrix(M, 0, 2, 4, 4)
C1 := submatrix(M, 0, 2, 5, 5)
# 2. Построить изображение пирамиды без удаления невидимых граней, рис. 1а (использовать лекционный пример). Построенный рисунок должен моделировать изображение пирамиды в прямоугольной об-ласти окна Windows с координатами:
# (200, 100) – оконные координаты левого верхнего угла области  ;
# (700, 500) – оконные координаты правого нижнего угла области  ;
# Задаются координаты прямоугольной области на экране (окна Windows), в которой будет нарисована пирамида
x_LW := 200
y_LW := 100  # – левый верхний угол области отображения
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x_HW := 700
y_HW := 500  # – правый нижний угол области отображения
# Формируем матрицу пересчета мировых координат в видовые координаты
K_view := [
    -sin(ϕ_v), cos(ϕ_v), 0, 0;
    -cos(θ_v)*cos(ϕ_v), -cos(θ_v)*sin(ϕ_v), sin(θ_v), 0;
    -sin(θ_v)*cos(ϕ_v), -sin(θ_v)*sin(ϕ_v), -cos(θ_v), r_v;
    0, 0, 0, 1
]
# Эта матрица учитывает положение и ориентацию камеры, заданные ранее сферическими координатами (rᵥ, Φᵥ, θᵥ). Она математически "поворачивает" и "сдвигает" всю мировую систему координат так, чтобы камера оказалась в начале координат новой, видовой системы, смотрела вдоль одной из осей, а направления "вверх" и "вправо" для камеры соответствовали осям Y' и X'.
M_view := K_view*M  # Получаем новую матрицу. Она содержит координаты тех же 6 вершин пирамиды, но уже в видовой системе координат.
# Следующий шаг – спроецировать 3D точки из видовой системы на 2D плоскость
# M_view<0> извлекает первую строку (все X'-координаты вершин из M_view), M_view<1> извлекает вторую строку (все Y'-координаты).
M_XY := stack(transpose(transpose(M_view)[:, 0]), transpose(transpose(M_view)[:, 1]), transpose(transpose(M_view)[:, 3]))
M_XY = [2.82843, 0, 2.82843, 0.707107, 0, 0.707107; -2, 0, 2, 2.32843, 2.82843, 3.32843; 1, 1, 1, 1, 1, 1]
# Вычисление габаритного прямоугольника
x_L := min(transpose(M_XY)[:, 0]) = 0
y_L := min(transpose(M_XY)[:, 1]) = -2  # - левый верхний угол
x_H := max(transpose(M_XY)[:, 0]) = 2.82843
y_H := max(transpose(M_XY)[:, 1]) = 3.32843  # - правый нижний угол
# Спроецированная пирамида на картинной плоскости ВСК вписывается в прямоугольник с координатами углов (xL, yL) = (0, -2) и (xH, yH) = (2.828, 3.328)
# Вычисляем параметры, необходимые для формирования матрицы пересчета координат из плоскости XY ВСК в ОСК
k_x := (x_HW - x_LW)/(x_H - x_L) = 176.777
k_y := (y_HW - y_LW)/(y_H - y_L) = 75.0691
T_SW := [k_x, 0, x_LW - k_x*x_L; 0, -k_y, y_HW + k_y*y_L; 0, 0, 1] = [176.777, 0, 200; 0, -75.0691, 349.862; 0, 0, 1]  # – матрица пересчета из ВСК в ОСК
# Применяем матрицу T_SW
M_W := T_SW*M_XY
# - Матрица M_W содержит окончательные координаты вершин пирамиды в оконной системе координат
M_W = [700, 200, 700, 325, 200, 325; 500, 349.862, 199.724, 175.069, 137.535, 100; 1, 1, 1, 1, 1, 1]
# Так как координаты на экране обычно целочисленные (пиксели), результат применения матрицы T_SW округляется до ближайших целых чисел
[x_a, x_b, x_c, x_a1, x_b1, x_c1; y_a, y_b, y_c, y_a1, y_b1, y_c1; q, q, q, q, q, q] := vectorize(round(M_W)) = [700, 200, 700, 325, 200, 325; 500, 350, 200, 175, 138, 100; 1, 1, 1, 1, 1, 1]
# Формируем массивы координат X и Y для рисования пирамиды
X := transpose([x_a, x_b, x_c, x_a, x_a1, x_b1, x_c1, x_a1, x_b1, x_b, x_c, x_c1])
Y := transpose([y_a, y_b, y_c, y_a, y_a1, y_b1, y_c1, y_a1, y_b1, y_b, y_c, y_c1])
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# Наши координаты в M_w были рассчитаны для оконной системы, где Y растет вниз. Однако стандартный XY-график в Mathcad имеет ось Y, направленную вверх. Чтобы изображение на графике выглядело правильно, мы инвертируем Y-координаты.
# Все ребра нарисованы, независимо от того, видимы они из положения камеры или должны быть перекрыты другими гранями
# 3. Построить изображение пирамиды с удалением невидимых граней. Построенный рисунок должен моделировать изображение пирамиды в прямоугольной области окна Windows с координатами:
# (200, 100) – оконные координаты левого верхнего угла области  ;
# (700, 500) – оконные координаты правого нижнего угла области  ;
# Вычисляется вектор положения камеры (C) в мировой декартовой системе координат (XYZ). Мы переводим сферические координаты (rᵥ, Φᵥ, θᵥ), которые мы задали ранее, в декартовы по стандартным формулам:
R_C := [r_v*sin(θ_v)*cos(ϕ_v); r_v*sin(θ_v)*sin(ϕ_v); r_v*cos(θ_v)] = [5; -5; 7.07107]
# Нормаль к грани – это вектор, перпендикулярный поверхности этой грани и указывающий "наружу" от ее лицевой стороны.
# Самый распространенный и фундаментальный способ найти нормаль – использовать векторное произведение
# Результатом векторного произведения будет вектор, перпендикулярный обоим исходным векторам, а значит, перпендикулярный плоскости, в которой лежит треугольник
# Нормаль для грани ACC1A1
# AC := C - A: Вектор, идущий от A к C
# AA1 := A1 - A: Вектор, идущий от A к A1
AC := [C[0]; C[1]; C[2]] - [A[0]; A[1]; A[2]]
AA1 := [A1[0]; A1[1]; A1[2]] - [A[0]; A[1]; A[2]]
# Эти два вектора лежат на гранях пирамиды, исходящих из вершины A. Они нужны для вычисления нормалей к этим граням
# Нормаль к грани – это вектор, перпендикулярный поверхности этой грани и указывающий "наружу" от ее лицевой стороны.
# Самый распространенный и фундаментальный способ найти нормаль – использовать векторное произведение
# Результатом векторного произведения будет вектор, перпендикулярный обоим исходным векторам, а значит, перпендикулярный плоскости, в которой лежит треугольник
N_ACC1A1 := AC×AA1
# Нормаль для грани A1C1B1
# A1B1 := B1 - A1: Вектор, идущий от A1 к B1
# A1C1 := C1 - A1: Вектор, идущий от A1 к C1
A1B1 := [B1[0]; B1[1]; B1[2]] - [A1[0]; A1[1]; A1[2]]
A1C1 := [C1[0]; C1[1]; C1[2]] - [A1[0]; A1[1]; A1[2]]
N_A1C1B1 := A1C1×A1B1
# Нормаль для грани ABB1A1
# AB := B - A: Вектор, идущий от A к B
# AA1 := A1 - A: Вектор, идущий от A к A1
AB := [B[0]; B[1]; B[2]] - [A[0]; A[1]; A[2]]
AA1 := [A1[0]; A1[1]; A1[2]] - [A[0]; A[1]; A[2]]
N_ABB1A1 := AA1×AB
# Нормаль для грани ACB
# AB := B - A: Вектор, идущий от A к B
# AA := C - A: Вектор, идущий от A к C
AC := [C[0]; C[1]; C[2]] - [A[0]; A[1]; A[2]]
AB := [B[0]; B[1]; B[2]] - [A[0]; A[1]; A[2]]
N_ACB := AB×AC
# Нормаль для грани BCC1B1
# BC := C - B: Вектор, идущий от B к C
# BB1 := B1 - B: Вектор, идущий от B к B1
BC := [C[0]; C[1]; C[2]] - [B[0]; B[1]; B[2]]
BB1 := [B1[0]; B1[1]; B1[2]] - [B[0]; B[1]; B[2]]
N_BCC1B1 := BB1×BC
# Вычисляется скалярное произведение вектора положения камеры и нормали грани
# - Если скалярное произведение ≥ 0, угол между вектором на камеру и внешней нормалью грани меньше или равен 90 градусов. Это значит, что грань "смотрит" в сторону камеры (или камера смотрит на нее сбоку). Грань видима.
# - Если скалярное произведение < 0, угол больше 90 градусов. Внешняя нормаль "указывает" в сторону от камеры. Это обратная ("задняя") грань, она невидима.
q1 := R_C*N_ACC1A1 = 84.8528
s1 := if(q1 ≥ 0, "Грань ACC1A1 видима", "Грань ACC1A1 невидима") = "Грань ACC1A1 видима"
q2 := R_C*N_A1C1B1 = 7.07107
s2 := if(q2 ≥ 0, "Грань A1C1B1 видима", "Грань A1C1B1 невидима") = "Грань A1C1B1 видима"
q3 := R_C*N_ABB1A1 = 80
s3 := if(q3 ≥ 0, "Грань ABB1A1 видима", "Грань ABB1A1 невидима") = "Грань ABB1A1 видима"
q4 := R_C*N_ACB = -113.137
s4 := if(q4 ≥ 0, "Грань ACB видима", "Грань ACB невидима") = "Грань ACB невидима"
q5 := R_C*N_BCC1B1 = -80
s5 := if(q5 ≥ 0, "Грань BCC1B1 видима", "Грань BCC1B1 невидима") = "Грань BCC1B1 невидима"
# Формируем массивы координат X и Y для рисования пирамиды
X := transpose([x_a, x_c, x_c1, x_a1, x_a, x_b, x_b1, x_a1, x_b1, x_c1])
Y := transpose([y_a, y_c, y_c1, y_a1, y_a, y_b, y_b1, y_a1, y_b1, y_c1])
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# 4. Построить сечение пирамиды (без удаления невидимых граней) плоскостью, положение которой в пространстве определяется: вектором нормали (0,sinφ, cosφ) и точко пересечения с осью Z (0,0, z0)
# Задаем положение секущей плоскости в МСК XYZ
ϕ_grad := 25
ϕ := ϕ_grad/180*π = 0.436332  # Угол переводится в радианы для использования в тригонометрических функциях
N := transpose([0, sin(ϕ), cos(ϕ)]) = [0; 0.422618; 0.906308]  # Вектор нормали (N) к секущей плоскости
# Координаты точки пересечения оси Z (ребра BB1) и секущей плоскости
x_0 := 0
y_0 := 0
z_0 := 3/4*M[:, 3][2] = 3
# Уравнение плоскости имеет вид: Ax + By + Cz + D = 0. Коэффициенты A, B, C берутся из вектора нормали N
[An; Bn; Cn] := N
[An; Bn; Cn] = [0; 0.422618; 0.906308]
D := -(An*x_0 + Bn*y_0 + Cn*z_0) = -2.71892
# Уравнение секущей плоскости полностью определено: 0*x + 0.423*y + 0.906*z - 2.719 = 0
# Находим точку пересечения P1 секущей плоскости с ребром CС1
[x1; y1; z1] := C
[x2; y2; z2] := C1
Δx := x2 - x1 = 0
Δy := y2 - y1 = -3
Δz := z2 - z1 = 4
t_СС1 := -((An*x1 + Bn*y1 + Cn*z1 + D)/(An*Δx + Bn*Δy + Cn*Δz)) = 0.436269
x_CC1 := x1 + Δx*t_СС1 = 0
y_CC1 := y1 + Δy*t_СС1 = 2.69119  # Координаты точки P1
z_CC1 := z1 + Δz*t_СС1 = 1.74508
# Находим точку пересечения P2 секущей плоскости с ребром AA1
[x1; y1; z1] := A
[x2; y2; z2] := A1
Δx := x2 - x1 = -3
Δy := y2 - y1 = 0
Δz := z2 - z1 = 4
t_AA1 := -((An*x1 + Bn*y1 + Cn*z1 + D)/(An*Δx + Bn*Δy + Cn*Δz)) = 0.75
x_AA1 := x1 + Δx*t_AA1 = 1.75
y_AA1 := y1 + Δy*t_AA1 = 0  # Координаты точки P2
z_AA1 := z1 + Δz*t_AA1 = 3
# Находим точку пересечения P3 секущей плоскости с ребром BB1
[x1; y1; z1] := B
[x2; y2; z2] := B1
Δx := x2 - x1 = 0
Δy := y2 - y1 = 0
Δz := z2 - z1 = 4
t_BB1 := -((An*x1 + Bn*y1 + Cn*z1 + D)/(An*Δx + Bn*Δy + Cn*Δz)) = 0.75
x_BB1 := x1 + Δx*t_BB1 = 0
y_BB1 := y1 + Δy*t_BB1 = 0  # Координаты точки P3
z_BB1 := z1 + Δz*t_BB1 = 3
# Получаем матрицу мировых коорднат точек P1, P2, P3
TR := [x_CC1, x_AA1, x_BB1; y_CC1, y_AA1, y_BB1; z_CC1, z_AA1, z_BB1; 1, 1, 1]
# Вычисляем координаты вершин треугольника сечения Р1, Р2, Р3 в видовой системе координат (ВСК)
TR_V := K_view*TR
# Определяем координаты проекции вершин треугольника сечения Р1, Р2, Р3 на картинную плоскость
TR_XY := stack(transpose(transpose(TR_V)[:, 0]), transpose(transpose(TR_V)[:, 1]), transpose(transpose(TR_V)[:, 3]))
# Вычисляем оконные координаты вершин треугольника сечения Р1, Р2, Р3
TR_W := T_SW*TR_XY = [536.399, 418.75, 200; 156.217, 256.302, 190.616; 1, 1, 1]
[x_p1, x_p2, x_p3; y_p1, y_p2, y_p3; q, q, q] := vectorize(round(TR_W)) = [536, 419, 200; 156, 256, 191; 1, 1, 1]
# Формируем массивы координат Х и У для рисования сечения пирамиды
XC := transpose([x_p1, x_p2, x_p3, x_p1])
YC := transpose([y_p1, y_p2, y_p3, y_p1])
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